OpenVSP model (file version 5), 24 components.
Geometry view with OpenVSP parameter names; values to 6 digits, angles in degrees, lengths in the model's unit.
Overall bounding box: X_Min=0 X_Len=48.7097 Y_Min=-22.03 Y_Len=43.9907 Z_Min=0 Z_Len=13.9955

Fuselage "Fuselage"
  location (X Y Z) 8.33333 0 8.33337, rotation 0 0 0
  bounding box size 40.0506 4.88084 5.57167
  Design: Length=40
  cross sections:
    n  XLocPercent  YLocPercent  ZLocPercent  shape
    0  0            0            -0.0326087   point
    1  0.159822     0            -0.0190124   general fuselage BotStr=0.83 BotTanAngle=90 CornerRad=0 Height=5 LowStr=0.83 MaxWidthLoc=0 TopStr=0.83 TopTanAngle=90 UpStr=0.83 Width=4.58333
    2  0.26         0            -0.014018    general fuselage BotStr=0.83 BotTanAngle=90 CornerRad=0 Height=5.42227 LowStr=0.83 MaxWidthLoc=0 TopStr=0.83 TopTanAngle=90 UpStr=0.83 Width=4.83333
    3  0.360821     0            -0.00781042  general fuselage BotStr=0.83 BotTanAngle=90 CornerRad=0 Height=4.8 LowStr=0.83 MaxWidthLoc=0 TopStr=0.83 TopTanAngle=90 UpStr=0.83 Width=4.16667
    4  0.42         0            0.001        general fuselage BotStr=0.83 BotTanAngle=90 CornerRad=0 Height=3.4 LowStr=0.83 MaxWidthLoc=0.0306122 TopStr=0.83 TopTanAngle=90 UpStr=0.83 Width=2.75
    5  0.48         0            0.01         general fuselage BotStr=0 BotTanAngle=90 CornerRad=0.12727 Height=2.2 LowStr=0 MaxWidthLoc=0.41818 TopStr=0.83 TopTanAngle=90 UpStr=0.83 Width=1.33333
    6  0.896759     0            0.01         as above
    7  0.96875      0            0.021        general fuselage BotStr=1.17595 BotTanAngle=90 CornerRad=0.41504 Height=1 LowStr=0.91267 MaxWidthLoc=0.41818 TopStr=0.83 TopTanAngle=90 UpStr=0.83 Width=0.71849
    8  1            0            0.027        point

Wing "Wing", child of "Fuselage"
  location (X Y Z) 14.8428 0 10.0451, rotation 0 0 0; relative location 0.833333 0 0.125, rotation 0 0 0
  symmetric about XZ
  bounding box size 6.28633 34.9294 2.14102
  totals: TotalSpan=35.0685 TotalProjectedSpan=34.8954 TotalChord=3.41026 TotalArea=113.981 TotalAR=10.6832
  root: chord 3.76923, twist 0, NACA 4-series Camber=0.02 CamberLoc=0.4 ThickChord=0.157
  sections:
    n  Span     Root_Chord  Tip_Chord  Area     Sweep     Sweep_Location  Dihedral  Twist  Twist_Location  tip airfoil
    1  1.73423  3.76923     3.76923    6.53673  0         0               0         0      0               as above
    2  6.8      3.76923     3.23077    23.8     -8.89635  0               6         0      0               as above
    3  9        3.23077     2.69231    26.6538  -9.16678  0               6         0      0               as above

Fuselage "RightInner_LiftNacelles", child of "Wing"
  location (X Y Z) 11.3688 8.49698 9.9406, rotation 8 2 0; relative location -2.40967 0 -0.81525, rotation 8 2 0
  bounding box size 16.0326 1.78899 2.32272
  Design: Length=16
  cross sections:
    n  XLocPercent  YLocPercent  ZLocPercent  shape
    0  0            0            0            point
    1  0.220109     0            0            general fuselage BotStr=0 BotTanAngle=90 CornerRad=0 Height=2.25 LowStr=0 MaxWidthLoc=0.3 TopStr=0.83 TopTanAngle=90 UpStr=0.83 Width=1.66667
    2  0.5          0            0.01         general fuselage BotStr=0 BotTanAngle=90 CornerRad=0.127 Height=2.1 LowStr=0 MaxWidthLoc=0.35 TopStr=0.83 TopTanAngle=90 UpStr=0.83 Width=1.66667
    3  0.828804     0            0.035        general fuselage BotStr=0 BotTanAngle=90 CornerRad=0.127 Height=1.5 LowStr=0 MaxWidthLoc=0.4 TopStr=0.83 TopTanAngle=90 UpStr=0.83 Width=1.5
    4  1            0            0.055        ellipse Ellipse_Height=0.666667 Ellipse_Width=0

Propeller "RightInner_LiftProp-1", child of "RightInner_LiftNacelles"
  location (X Y Z) 20.4257 8.29733 11.3614, rotation -82 0 92
  bounding box size 9.67733 1.09865 0.952137
  Design: Diameter=9.566 NumBlade=2 Beta34=20.0182 UseBeta34Flag=1 Feather=27.4364 Rotate=0 ReverseFlag=1 FoldAngle=0 PropMode=0 AF=143.489 CLi=0.472232 Chord=0.234284 Solidity=0.14915 ConstructXoC=0.5 FeatherAxisXoC=0.5 FeatherOffsetXoC=0
  cross sections:
    n  RadiusFrac  shape
    0  0           NACA 4-series Camber=0 CamberLoc=0.2 Chord=1.28066 ThickChord=0.12
    1  1           NACA 4-series Camber=0.05 CamberLoc=0.4 Chord=0.960498 ThickChord=0.12
  Chord along r/R (PCHIP): 0: 0.267753, 1: 0.200815
  Twist along r/R (linear): 0: 12.2318, 1: -13.9682
  Thick along r/R (linear): 0: 0.12, 1: 0.12
  CLI along r/R (linear): 0: 0, 1: 0.640061

Propeller "RightInner_LiftProp-2", child of "RightInner_LiftNacelles"
  location (X Y Z) 20.4463 8.215 11.947, rotation -172 88 -180
  bounding box size 1.03185 9.59828 1.60769
  Design: Diameter=9.566 NumBlade=2 Beta34=20.0182 UseBeta34Flag=1 Feather=27.4364 Rotate=0 ReverseFlag=1 FoldAngle=0 PropMode=0 AF=143.486 CLi=0.472232 Chord=0.23428 Solidity=0.149147 ConstructXoC=0.5 FeatherAxisXoC=0.5 FeatherOffsetXoC=0
  cross sections:
    n  RadiusFrac  shape
    0  0           NACA 4-series Camber=0 CamberLoc=0.2 Chord=1.28065 ThickChord=0.12
    1  1           NACA 4-series Camber=0.05 CamberLoc=0.4 Chord=0.960474 ThickChord=0.12
  Chord along r/R (PCHIP): 0: 0.26775, 1: 0.20081
  Twist along r/R (linear): 0: 12.2318, 1: -13.9682
  Thick along r/R (linear): 0: 0.12, 1: 0.12
  CLI along r/R (linear): 0: 0, 1: 0.640061

Fuselage "RightOuter_LiftNacelles", child of "Wing"
  location (X Y Z) 7.91643 17.4477 10.8814, rotation 8 2 0; relative location -4.40967 0 -0.815217, rotation 8 2 0
  bounding box size 18.0352 1.91038 2.29343
  Design: Length=18
  cross sections:
    n  XLocPercent  YLocPercent  ZLocPercent  shape
    0  0            0            0            point
    1  0.110054     0            0            circle Circle_Diameter=1.66667
    2  0.220109     0            0            general fuselage BotStr=0 BotTanAngle=90 CornerRad=0 Height=2.25 LowStr=0 MaxWidthLoc=0.3 TopStr=0.83 TopTanAngle=90 UpStr=0.83 Width=1.66667
    3  0.5          0            0.01         general fuselage BotStr=0 BotTanAngle=90 CornerRad=0.127 Height=2.1 LowStr=0 MaxWidthLoc=0.35 TopStr=0.83 TopTanAngle=90 UpStr=0.83 Width=1.66667
    4  0.828804     0            0.035        general fuselage BotStr=0 BotTanAngle=90 CornerRad=0.127 Height=1.5 LowStr=0 MaxWidthLoc=0.4 TopStr=0.83 TopTanAngle=90 UpStr=0.83 Width=1.5
    5  1            0            0.055        ellipse Ellipse_Height=0.666667 Ellipse_Width=0

Propeller "Right_CrzProp", child of "RightOuter_LiftNacelles"
  location (X Y Z) 10.1664 17.4477 10.8814, rotation -180 0 0
  bounding box size 0.65153 4.19308 4.83677
  Design: Diameter=5.544 NumBlade=3 Beta34=47.1027 UseBeta34Flag=1 Feather=37.3676 Rotate=0 ReverseFlag=0 FoldAngle=0 PropMode=0 AF=46.8337 CLi=0.454228 Chord=0.13525 Solidity=0.129154 ConstructXoC=0.5 FeatherAxisXoC=0.5 FeatherOffsetXoC=0
  cross sections:
    n  RadiusFrac  shape
    0  0.175       NACA 4-series Camber=0 CamberLoc=0.2 Chord=0.666666 ThickChord=0.12
    1  1           NACA 4-series Camber=0.05 CamberLoc=0.4 Chord=0.08316 ThickChord=0.12
  Chord along r/R (linear): 0.175: 0.2405, 1: 0.03
  Twist along r/R (linear): 0.175: 40.2973, 1: -3.55273
  Thick along r/R (linear): 0.175: 0.12, 1: 0.12
  CLI along r/R (linear): 0.175: 0, 1: 0.640061

Propeller "RightOuter_LiftProp-1", child of "RightOuter_LiftNacelles"
  location (X Y Z) 18.6391 17.2561 12.2446, rotation -82 0 92
  bounding box size 9.67733 1.09863 0.952127
  Design: Diameter=9.566 NumBlade=2 Beta34=20.0182 UseBeta34Flag=1 Feather=27.4364 Rotate=0 ReverseFlag=1 FoldAngle=0 PropMode=0 AF=143.486 CLi=0.472232 Chord=0.23428 Solidity=0.149147 ConstructXoC=0.5 FeatherAxisXoC=0.5 FeatherOffsetXoC=0
  cross sections:
    n  RadiusFrac  shape
    0  0           NACA 4-series Camber=0 CamberLoc=0.2 Chord=1.28065 ThickChord=0.12
    1  1           NACA 4-series Camber=0.05 CamberLoc=0.4 Chord=0.960474 ThickChord=0.12
  blade curves as in "RightInner_LiftProp-2"

Propeller "RightOuter_LiftProp-2", child of "RightOuter_LiftNacelles"
  location (X Y Z) 18.6597 17.1738 12.8302, rotation -172 88 -180
  bounding box size 1.03185 9.59828 1.60769
  Design: Diameter=9.566 NumBlade=2 Beta34=20.0182 UseBeta34Flag=1 Feather=27.4364 Rotate=0 ReverseFlag=1 FoldAngle=0 PropMode=0 AF=143.486 CLi=0.472232 Chord=0.23428 Solidity=0.149147 ConstructXoC=0.5 FeatherAxisXoC=0.5 FeatherOffsetXoC=0
  cross sections:
    n  RadiusFrac  shape
    0  0           NACA 4-series Camber=0 CamberLoc=0.2 Chord=1.28065 ThickChord=0.12
    1  1           NACA 4-series Camber=0.05 CamberLoc=0.4 Chord=0.960474 ThickChord=0.12
  blade curves as in "RightInner_LiftProp-2"

Fuselage "LeftInner_LiftNacelles", child of "Wing"
  location (X Y Z) 11.3688 -8.497 9.94063, rotation -8 2 0; relative location -2.40967 -16.994 -0.815217, rotation -8 2 0
  bounding box size 16.0326 1.7874 2.32272
  Design: Length=16
  cross sections:
    n  XLocPercent  YLocPercent  ZLocPercent  shape
    0  0            0            0            point
    1  0.220109     0            0            general fuselage BotStr=0 BotTanAngle=90 CornerRad=0 Height=2.25 LowStr=0 MaxWidthLoc=0.3 TopStr=0.83 TopTanAngle=90 UpStr=0.83 Width=1.66667
    2  0.5          0            0.01         general fuselage BotStr=0 BotTanAngle=90 CornerRad=0.127 Height=2.1 LowStr=0 MaxWidthLoc=0.35 TopStr=0.83 TopTanAngle=90 UpStr=0.83 Width=1.66667
    3  0.828804     0            0.035        general fuselage BotStr=0 BotTanAngle=90 CornerRad=0.127 Height=1.5 LowStr=0 MaxWidthLoc=0.4 TopStr=0.83 TopTanAngle=90 UpStr=0.83 Width=1.5
    4  1            0            0.055        ellipse Ellipse_Height=0.666667 Ellipse_Width=0

Propeller "LeftInner_LiftProp-1", child of "LeftInner_LiftNacelles"
  location (X Y Z) 20.4257 -8.29733 11.3615, rotation -98 0 92
  bounding box size 9.67733 1.09863 0.952127
  Design: Diameter=9.566 NumBlade=2 Beta34=20.0182 UseBeta34Flag=1 Feather=27.4364 Rotate=0 ReverseFlag=0 FoldAngle=0 PropMode=0 AF=143.486 CLi=0.472232 Chord=0.23428 Solidity=0.149147 ConstructXoC=0.5 FeatherAxisXoC=0.5 FeatherOffsetXoC=0
  cross sections:
    n  RadiusFrac  shape
    0  0           NACA 4-series Camber=0 CamberLoc=0.2 Chord=1.28065 ThickChord=0.12
    1  1           NACA 4-series Camber=0.05 CamberLoc=0.4 Chord=0.960474 ThickChord=0.12
  blade curves as in "RightInner_LiftProp-2"

Propeller "LeftInner_LiftProp-2", child of "LeftInner_LiftNacelles"
  location (X Y Z) 20.4464 -8.215 11.947, rotation 172 88 -180
  bounding box size 1.03185 9.59828 1.60769
  Design: Diameter=9.566 NumBlade=2 Beta34=20.0182 UseBeta34Flag=1 Feather=27.4364 Rotate=0 ReverseFlag=0 FoldAngle=0 PropMode=0 AF=143.486 CLi=0.472232 Chord=0.23428 Solidity=0.149147 ConstructXoC=0.5 FeatherAxisXoC=0.5 FeatherOffsetXoC=0
  cross sections:
    n  RadiusFrac  shape
    0  0           NACA 4-series Camber=0 CamberLoc=0.2 Chord=1.28065 ThickChord=0.12
    1  1           NACA 4-series Camber=0.05 CamberLoc=0.4 Chord=0.960474 ThickChord=0.12
  blade curves as in "RightInner_LiftProp-2"

Fuselage "LeftOuter_LiftNacelles", child of "Wing"
  location (X Y Z) 7.91643 -17.4477 10.8814, rotation -8 2 0; relative location -4.40967 -34.8953 -0.815217, rotation -8 2 0
  bounding box size 18.0352 1.91027 2.29343
  Design: Length=18
  cross sections:
    n  XLocPercent  YLocPercent  ZLocPercent  shape
    0  0            0            0            point
    1  0.110054     0            0            circle Circle_Diameter=1.66667
    2  0.220109     0            0            general fuselage BotStr=0 BotTanAngle=90 CornerRad=0 Height=2.25 LowStr=0 MaxWidthLoc=0.3 TopStr=0.83 TopTanAngle=90 UpStr=0.83 Width=1.66667
    3  0.5          0            0.01         general fuselage BotStr=0 BotTanAngle=90 CornerRad=0.127 Height=2.1 LowStr=0 MaxWidthLoc=0.35 TopStr=0.83 TopTanAngle=90 UpStr=0.83 Width=1.66667
    4  0.828804     0            0.035        general fuselage BotStr=0 BotTanAngle=90 CornerRad=0.127 Height=1.5 LowStr=0 MaxWidthLoc=0.4 TopStr=0.83 TopTanAngle=90 UpStr=0.83 Width=1.5
    5  1            0            0.055        ellipse Ellipse_Height=0.666667 Ellipse_Width=0

Propeller "Left_CrzProp", child of "LeftOuter_LiftNacelles"
  location (X Y Z) 10.1664 -17.4477 10.8814, rotation -180 0 0
  bounding box size 0.65153 4.19308 4.83677
  Design: Diameter=5.544 NumBlade=3 Beta34=47.1027 UseBeta34Flag=1 Feather=37.3676 Rotate=0 ReverseFlag=1 FoldAngle=0 PropMode=0 AF=46.8337 CLi=0.454228 Chord=0.13525 Solidity=0.129154 ConstructXoC=0.5 FeatherAxisXoC=0.5 FeatherOffsetXoC=0
  cross sections:
    n  RadiusFrac  shape
    0  0.175       NACA 4-series Camber=0 CamberLoc=0.2 Chord=0.666666 ThickChord=0.12
    1  1           NACA 4-series Camber=0.05 CamberLoc=0.4 Chord=0.08316 ThickChord=0.12
  blade curves as in "Right_CrzProp"

Propeller "LeftOuter_LiftProp-1", child of "LeftOuter_LiftNacelles"
  location (X Y Z) 18.6391 -17.2561 12.2446, rotation -98 0 92
  bounding box size 9.67733 1.09863 0.952127
  Design: Diameter=9.566 NumBlade=2 Beta34=20.0182 UseBeta34Flag=1 Feather=27.4364 Rotate=0 ReverseFlag=0 FoldAngle=0 PropMode=0 AF=143.486 CLi=0.472232 Chord=0.23428 Solidity=0.149147 ConstructXoC=0.5 FeatherAxisXoC=0.5 FeatherOffsetXoC=0
  cross sections:
    n  RadiusFrac  shape
    0  0           NACA 4-series Camber=0 CamberLoc=0.2 Chord=1.28065 ThickChord=0.12
    1  1           NACA 4-series Camber=0.05 CamberLoc=0.4 Chord=0.960474 ThickChord=0.12
  blade curves as in "RightInner_LiftProp-2"

Propeller "LeftOuter_LiftProp-2", child of "LeftOuter_LiftNacelles"
  location (X Y Z) 18.6597 -17.2431 12.8302, rotation 172 88 -180
  bounding box size 1.03185 9.59828 1.60769
  Design: Diameter=9.566 NumBlade=2 Beta34=20.0182 UseBeta34Flag=1 Feather=27.4364 Rotate=0 ReverseFlag=0 FoldAngle=0 PropMode=0 AF=143.486 CLi=0.472232 Chord=0.23428 Solidity=0.149147 ConstructXoC=0.5 FeatherAxisXoC=0.5 FeatherOffsetXoC=0
  cross sections:
    n  RadiusFrac  shape
    0  0           NACA 4-series Camber=0 CamberLoc=0.2 Chord=1.28065 ThickChord=0.12
    1  1           NACA 4-series Camber=0.05 CamberLoc=0.4 Chord=0.960474 ThickChord=0.12
  blade curves as in "RightInner_LiftProp-2"

Wing "VerticalTail", child of "Fuselage"
  location (X Y Z) 44.3247 0 9.83262, rotation 90 0 0; relative location 0 0 0, rotation 90 0 0
  bounding box size 4.38499 0.600188 3.83333
  totals: TotalSpan=3.83333 TotalProjectedSpan=3.83333 TotalChord=3.75 TotalArea=14.375 TotalAR=1.02222
  root: chord 4, twist 0, NACA 4-series Camber=0 CamberLoc=0.2 ThickChord=0.15
  sections:
    n  Span     Root_Chord  Tip_Chord  Area    Sweep  Sweep_Location  Dihedral  Twist  Twist_Location  tip airfoil
    1  3.83333  4           3.5        14.375  13     0               0         0      0.25            NACA 4-series Camber=0 CamberLoc=0.2 ThickChord=0.1

Wing "Tail", child of "VerticalTail"
  location (X Y Z) 45.2097 0 13.666, rotation 0 0 0; relative location 0 0 0, rotation 0 0 0
  symmetric about XZ
  bounding box size 3.50044 16.2935 0.529208
  totals: TotalSpan=16 TotalProjectedSpan=16 TotalChord=2.75 TotalArea=44 TotalAR=5.81818
  root: chord 3.5, twist 0, NACA 4-series Camber=0.02 CamberLoc=0.4 ThickChord=0.15
  sections:
    n  Span  Root_Chord  Tip_Chord  Area  Sweep    Sweep_Location  Dihedral  Twist  Twist_Location  tip airfoil
    1  8     3.5         2          22    10.6197  0               0         0      0.25            as above

Blank "AftCorotating1", child of "Fuselage"
  location (X Y Z) 30.25 0 8.50003, rotation 0 0 0; relative location 21.9167 0 0.166667, rotation 0 0 0

Propeller "FrontTailLiftProp-1", child of "AftCorotating1"
  location (X Y Z) 30.25 0 10.3333, rotation -90 0 90
  bounding box size 7.52941 0.787007 0.642552
  Design: Diameter=7.44 NumBlade=2 Beta34=20.0182 UseBeta34Flag=1 Feather=27.4364 Rotate=0 ReverseFlag=0 FoldAngle=0 PropMode=0 AF=143.486 CLi=0.472232 Chord=0.23428 Solidity=0.149147 ConstructXoC=0.5 FeatherAxisXoC=0.5 FeatherOffsetXoC=0
  cross sections:
    n  RadiusFrac  shape
    0  0           NACA 4-series Camber=0 CamberLoc=0.2 Chord=0.99603 ThickChord=0.12
    1  1           NACA 4-series Camber=0.05 CamberLoc=0.4 Chord=0.747013 ThickChord=0.12
  blade curves as in "RightInner_LiftProp-2"

Propeller "FrontTailLiftProp-2", child of "AftCorotating1"
  location (X Y Z) 30.25 0 10.925, rotation 0 90 0
  bounding box size 0.787007 7.52941 0.642552
  Design: Diameter=7.44 NumBlade=2 Beta34=20.0182 UseBeta34Flag=1 Feather=27.4364 Rotate=0 ReverseFlag=0 FoldAngle=0 PropMode=0 AF=143.486 CLi=0.472232 Chord=0.23428 Solidity=0.149147 ConstructXoC=0.5 FeatherAxisXoC=0.5 FeatherOffsetXoC=0
  cross sections:
    n  RadiusFrac  shape
    0  0           NACA 4-series Camber=0 CamberLoc=0.2 Chord=0.99603 ThickChord=0.12
    1  1           NACA 4-series Camber=0.05 CamberLoc=0.4 Chord=0.747013 ThickChord=0.12
  blade curves as in "RightInner_LiftProp-2"

Blank "AftCorotating2", child of "Fuselage"
  location (X Y Z) 39.5616 0 8.50003, rotation 0 0 0; relative location 31.2282 0 0.166667, rotation 0 0 0

Propeller "AftTailLiftProp-1", child of "AftCorotating2"
  location (X Y Z) 39.5616 0 10.3333, rotation -90 0 90
  bounding box size 7.52941 0.787007 0.642552
  Design: Diameter=7.44 NumBlade=2 Beta34=20.0182 UseBeta34Flag=1 Feather=27.4364 Rotate=0 ReverseFlag=1 FoldAngle=0 PropMode=0 AF=143.486 CLi=0.472232 Chord=0.23428 Solidity=0.149147 ConstructXoC=0.5 FeatherAxisXoC=0.5 FeatherOffsetXoC=0
  cross sections:
    n  RadiusFrac  shape
    0  0           NACA 4-series Camber=0 CamberLoc=0.2 Chord=0.99603 ThickChord=0.12
    1  1           NACA 4-series Camber=0.05 CamberLoc=0.4 Chord=0.747013 ThickChord=0.12
  blade curves as in "RightInner_LiftProp-2"

Propeller "AftTailLiftProp-2", child of "AftCorotating2"
  location (X Y Z) 39.5616 0 10.925, rotation 0 90 0
  bounding box size 0.787007 7.52941 0.642552
  Design: Diameter=7.44 NumBlade=2 Beta34=20.0182 UseBeta34Flag=1 Feather=27.4364 Rotate=0 ReverseFlag=1 FoldAngle=0 PropMode=0 AF=143.486 CLi=0.472232 Chord=0.23428 Solidity=0.149147 ConstructXoC=0.5 FeatherAxisXoC=0.5 FeatherOffsetXoC=0
  cross sections:
    n  RadiusFrac  shape
    0  0           NACA 4-series Camber=0 CamberLoc=0.2 Chord=0.99603 ThickChord=0.12
    1  1           NACA 4-series Camber=0.05 CamberLoc=0.4 Chord=0.747013 ThickChord=0.12
  blade curves as in "RightInner_LiftProp-2"

User parameters
  VTOL:DiskArea = 3.33333  (Disk Area)
  VTOL:DiskLoading = 50  (Disk Loading)
  VTOL:GrossWeight = 5000  (Gross Weight)
  VTOL:Naft = 20  (Number of disks in aft array)
  VTOL:Nfwd = 10  (Number of disks in forward array)
  VTOL:Spac = 0  (Spac)
