OpenVSP model (file version 4), 1 components.
Geometry view with OpenVSP parameter names; values to 6 digits, angles in degrees, lengths in the model's unit.
Overall bounding box: X_Min=-2.56643 X_Len=4.90477 Y_Min=-27.2997 Y_Len=75.3796 Z_Min=-43.1303 Z_Len=86.2607

Propeller "Prop"
  location (X Y Z) 0 0 0, rotation 0 0 0
  bounding box size 4.90477 75.3796 86.2607
  Design: Diameter=96 NumBlade=3 Beta34=20 UseBeta34Flag=1 Feather=0 Rotate=0 ReverseFlag=0 FoldAngle=0 AF=151.538 ConstructXoC=0.5
  cross sections:
    n  RadiusFrac  shape
    0  0.2         circle Circle_Diameter=3.84
    1  0.45        NACA 4-series Camber=0.05 CamberLoc=0.4 Chord=8.66344 ThickChord=0.12
    2  0.7         NACA 4-series Camber=0.05 CamberLoc=0.4 Chord=9.6 ThickChord=0.05
    3  1           NACA 4-series Camber=0.01 CamberLoc=0.4 Chord=6.24 ThickChord=0.03
  Chord along r/R (cubic Bezier): 0.2: 0.08, 0.333333: 0.15, 0.466667: 0.2, 0.6: 0.2, 0.716667: 0.2, 0.833333: 0.2, 0.95: 0.2, 0.966667: 0.2, 0.983333: 0.2, 1: 0.13
  Twist along r/R (PCHIP): 0.2: 46.75, 0.75: 20, 1: 13
