OpenVSP model (file version 5), 6 components.
Geometry view with OpenVSP parameter names; values to 6 digits, angles in degrees, lengths in the model's unit.
Overall bounding box: X_Min=-0.0016642 X_Len=10.0017 Y_Min=-9 Y_Len=18 Z_Min=-2 Z_Len=8.27705

Pod "PodGeom"
  location (X Y Z) 0 0 0, rotation 0 0 0
  bounding box size 10 1.33333 1.33333
  Design: FineRatio=15 Length=10

Wing "WingGeom", child of "PodGeom"
  location (X Y Z) 2 0 0, rotation 0 0 0
  symmetric about XZ
  bounding box size 6.19615 18 0.400232
  totals: TotalSpan=18 TotalProjectedSpan=18 TotalChord=2.5 TotalArea=45 TotalAR=7.2 MAC=2.8
  root: chord 4, twist 0, NACA 4-series Camber=0 CamberLoc=0.2 ThickChord=0.1
  sections:
    n  Span  Root_Chord  Tip_Chord  Area  Sweep  Sweep_Location  Dihedral  Twist  Twist_Location  tip airfoil
    1  9     4           1          22.5  30     0               0         0      0.25            as above

Propeller "CenterProp"
  location (X Y Z) 1 0 0, rotation 0 0 0
  bounding box size 0 4 4
  Design: Diameter=4 NumBlade=3 Beta34=20 UseBeta34Flag=1 Feather=0 Rotate=0 Precone=0 ReverseFlag=0 FoldAngle=0 PropMode=2 AF=151.538 CLi=0.538798 Chord=0.177656 Solidity=0.169649 ConstructXoC=0.5 FeatherAxisXoC=0.5 FeatherOffsetXoC=0
  cross sections:
    n  RadiusFrac  shape
    0  0.2         ellipse Ellipse_Height=0.08 Ellipse_Width=0.16
    1  0.4         NACA 16-series Chord=0.3325 IdealCl=0.7 ThickChord=0.144074
    2  1           NACA 16-series Chord=0.26 IdealCl=0.2 ThickChord=0.03
  Chord along r/R (cubic Bezier): 0.2: 0.08, 0.333333: 0.15, 0.466667: 0.2, 0.6: 0.2, 0.716667: 0.2, 0.833333: 0.2, 0.95: 0.2, 0.966667: 0.2, 0.983333: 0.2, 1: 0.13
  Twist along r/R (PCHIP): 0.2: 46.75, 0.75: 20, 1: 13
  Thick along r/R (cubic Bezier): 0.2: 0.5, 0.233333: 0.3, 0.266667: 0.225, 0.3: 0.2, 0.4: 0.125, 0.5: 0.115, 0.6: 0.1, 0.733333: 0.075, 0.866667: 0.055, 1: 0.03
  CLI along r/R (cubic Bezier): 0.2: 0, 0.266667: 0.7, 0.333333: 0.7, 0.4: 0.7, 0.466667: 0.7, 0.533333: 0.7, 0.6: 0.7, 0.733333: 0.7, 0.866667: 0.7, 1: 0.2

Propeller "WingProps"
  location (X Y Z) 3 6 0, rotation 0 0 0
  symmetric about XZ
  bounding box size 0 16 4
  Design: Diameter=4 NumBlade=3 Beta34=20 UseBeta34Flag=1 Feather=0 Rotate=0 Precone=0 ReverseFlag=0 FoldAngle=0 PropMode=2 AF=151.538 CLi=0.538798 Chord=0.177656 Solidity=0.169649 ConstructXoC=0.5 FeatherAxisXoC=0.5 FeatherOffsetXoC=0
  cross sections:
    n  RadiusFrac  shape
    0  0.2         ellipse Ellipse_Height=0.08 Ellipse_Width=0.16
    1  0.4         NACA 16-series Chord=0.3325 IdealCl=0.7 ThickChord=0.144074
    2  1           NACA 16-series Chord=0.26 IdealCl=0.2 ThickChord=0.03
  blade curves as in "CenterProp"

BodyOfRevolution "Duct"
  location (X Y Z) 0 0 5, rotation 0 0 0
  bounding box size 2.00166 2.5541 2.5541
  Design: A0=3.14159 Ae=3.14159 Amin=2.37642 AminW=0.385863 Angle=0 Diameter=2 Mode=0
  profile: NACA 4-series Camber=0.04 CamberLoc=0.4 Chord=2 ThickChord=0.2

Propeller "DuctDisk", child of "Duct"
  location (X Y Z) 1 0 5, rotation 0 0 0; relative location 1 0 0, rotation 0 0 0
  bounding box size 0 2 2
  Design: Diameter=2 NumBlade=3 Beta34=20 UseBeta34Flag=1 Feather=0 Rotate=0 Precone=0 ReverseFlag=0 FoldAngle=0 PropMode=2 AF=151.538 CLi=0.538798 Chord=0.177656 Solidity=0.169649 ConstructXoC=0.5 FeatherAxisXoC=0.5 FeatherOffsetXoC=0
  cross sections:
    n  RadiusFrac  shape
    0  0.2         ellipse Ellipse_Height=0.04 Ellipse_Width=0.08
    1  0.4         NACA 16-series Chord=0.16625 IdealCl=0.7 ThickChord=0.144074
    2  1           NACA 16-series Chord=0.13 IdealCl=0.2 ThickChord=0.03
  blade curves as in "CenterProp"
