OpenVSP model (file version 5), 5 components.
Geometry view with OpenVSP parameter names; values to 6 digits, angles in degrees, lengths in the model's unit.
Overall bounding box: X_Min=0 X_Len=20.5241 Y_Min=-3.44206 Y_Len=6.88411 Z_Min=-1.7 Z_Len=3

Stack "Fuselage Ref"
  location (X Y Z) 0 0 0, rotation 0 0 0
  bounding box size 20.5241 2.8 3
  cross sections:
    n  CurveBasis  VAlign  XDelta  XRotateAbs  XSAbsRelFlag  YDelta  YRotateAbs  ZDelta  ZRotateAbs  shape
    0  0           0       0       0           1             0       0           0       0           circle Circle_Diameter=1
    1  0           0       4.5     0           1             0       0           -0.2    0           rounded rectangle RoundRectXSec_KeyCorner=1 RoundRectXSec_Radius=0.85 RoundRectXSec_RadiusBL=0.2 RoundRectXSec_RadiusBR=0.2 RoundRectXSec_RadiusTL=0.85 RoundedRect_Height=3 RoundedRect_RadiusSymmetryType=1 RoundedRect_Width=2.8
    2  0           0       5.3     0           1             0       0           0       0           rounded rectangle RoundRectXSec_KeyCorner=1 RoundRectXSec_Radius=0.85 RoundRectXSec_RadiusBL=0.2 RoundRectXSec_RadiusBR=0.2 RoundRectXSec_RadiusTL=0.85 RoundedRect_Height=2.8 RoundedRect_RadiusSymmetryType=1 RoundedRect_Width=2.8
    3  0           0       10.5    0           1             0       0           0.25    0           rounded rectangle RoundRectXSec_Radius=0.1 RoundedRect_Height=0.5 RoundedRect_Width=0.3

Stack "Fuselage Fwd", child of "Fuselage Ref"
  location (X Y Z) 0 0 0, rotation 0 0 0
  bounding box size 9.8 2.8 3
  cross sections:
    n  CurveBasis  VAlign  XDelta  XRotateAbs  XSAbsRelFlag  YDelta  YRotateAbs  ZDelta  ZRotateAbs  shape
    0  0           0       0       0           1             0       0           0       0           circle Circle_Diameter=1
    1  0           0       4.5     0           1             0       0           -0.2    0           rounded rectangle RoundRectXSec_KeyCorner=1 RoundRectXSec_Radius=0.85 RoundRectXSec_RadiusBL=0.2 RoundRectXSec_RadiusBR=0.2 RoundRectXSec_RadiusTL=0.85 RoundedRect_Height=3 RoundedRect_RadiusSymmetryType=1 RoundedRect_Width=2.8
    2  0           0       5.3     0           1             0       0           0       0           rounded rectangle RoundRectXSec_KeyCorner=1 RoundRectXSec_Radius=0.86 RoundRectXSec_RadiusBL=0.2 RoundRectXSec_RadiusBR=0.2 RoundRectXSec_RadiusTL=0.86 RoundedRect_Height=3 RoundedRect_RadiusSymmetryType=1 RoundedRect_Width=2.8

Hinge "Hinge", child of "Fuselage Fwd"
  location (X Y Z) 9.8 1.4 -0.2, rotation 0 0 0
  Hinge: JointRotMax=360 JointRotMaxFlag=0 JointRotMin=-360 JointRotMinFlag=0 JointRotate=0 JointRotateFlag=1 JointTransMax=1000 JointTransMaxFlag=0 JointTransMin=-1000 JointTransMinFlag=0 JointTranslate=0 JointTranslateFlag=0 OrientRotFlag=0 PrimOffAbsRelFlag=1 PrimType=0 PrimULoc=0 PrimVecAbsRelFlag=1 PrimWLoc=0 PrimXOff=0 PrimXOffRel=0 PrimXVec=0 PrimXVecRel=0 PrimYOff=0 PrimYOffRel=0 PrimYVec=0 PrimYVecRel=0 PrimZOff=0 PrimZOffRel=0 PrimZVec=1 PrimZVecRel=1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

Stack "Tailcone", child of "Hinge"
  location (X Y Z) 9.8 0 -0.2, rotation 0 0 0; relative location 0 -1.4 0, rotation 0 0 0
  bounding box size 10.722 2.8 3
  cross sections:
    n  CurveBasis  VAlign  XDelta  XRotateAbs  XSAbsRelFlag  YDelta  YRotateAbs  ZDelta  ZRotateAbs  shape
    0  0           0       0       0           1             0       0           0       0           rounded rectangle RoundRectXSec_KeyCorner=1 RoundRectXSec_Radius=0.85 RoundRectXSec_RadiusBL=0.2 RoundRectXSec_RadiusBR=0.2 RoundRectXSec_RadiusTL=0.85 RoundedRect_Height=3 RoundedRect_RadiusSymmetryType=1 RoundedRect_Width=2.8
    1  0           0       10.5    0           1             0       0           0.25    0           rounded rectangle RoundRectXSec_Radius=0.1 RoundedRect_Height=0.5 RoundedRect_Width=0.3

Wing "Horizontal", child of "Tailcone"
  location (X Y Z) 17.1 0 0.2, rotation 0 0 0; relative location 7.3 0 0.4, rotation 0 0 0
  symmetric about XZ
  bounding box size 3.2 6.88411 0.38411
  totals: TotalSpan=6.5 TotalProjectedSpan=6.5 TotalChord=3.2 TotalArea=20.8 TotalAR=2.03125 MAC=3.2
  root: chord 3.2, twist 0, NACA 4-series Camber=0 CamberLoc=0.2 ThickChord=0.12
  sections:
    n  Span  Root_Chord  Tip_Chord  Area  Sweep  Sweep_Location  Dihedral  Twist  Twist_Location  tip airfoil
    1  3.25  3.2         3.2        10.4  0      0.65            0         0      0.25            as above
  SS_Control "Elevator": EtaStart=0.12 EtaEnd=0.99 Length_C_Start=0.35 Length_C_End=0.35 Length_Start=1.12 Length_End=1.12 LE_Flag=0 Surf_Type=2

VSPAERO settings: Sref=0.4125 bref=1.65 cref=0.25 Xcg=0 Ycg=0 Zcg=0 AlphaStart=2 AlphaEnd=1 AlphaNpts=1 BetaStart=0 BetaEnd=0 BetaNpts=1 MachStart=0 MachEnd=0 MachNpts=1 ReCref=1e+07 Vinf=100 Rho=0.002377
