OpenVSP model (file version 5), 4 components.
Geometry view with OpenVSP parameter names; values to 6 digits, angles in degrees, lengths in the model's unit.
Overall bounding box: X_Min=0 X_Len=10 Y_Min=-9 Y_Len=18 Z_Min=-1 Z_Len=3

Pod "PodGeom"
  location (X Y Z) 0 0 0, rotation 0 0 0
  bounding box size 10 1.33333 1.33333
  Design: FineRatio=15 Length=10

Wing "WingGeom", child of "PodGeom"
  location (X Y Z) 2 0 0, rotation 0 0 0
  symmetric about XZ
  bounding box size 6.19615 18 0.400232
  totals: TotalSpan=18 TotalProjectedSpan=18 TotalChord=2.5 TotalArea=45 TotalAR=7.2 MAC=2.8
  root: chord 4, twist 0, NACA 4-series Camber=0 CamberLoc=0.2 ThickChord=0.1
  sections:
    n  Span  Root_Chord  Tip_Chord  Area  Sweep  Sweep_Location  Dihedral  Twist  Twist_Location  tip airfoil
    1  9     4           1          22.5  30     0               0         0      0.25            as above

Ellipsoid "CenterHole"
  location (X Y Z) 3 0 0, rotation 0 0 0
  bounding box size 2 2 2
  negative volume
  Design: A_Radius=1 B_Radius=1 C_Radius=1

Ellipsoid "WingDivot"
  location (X Y Z) 4.7 4 1, rotation 0 0 0
  symmetric about XZ
  bounding box size 2 10 2
  negative volume
  Design: A_Radius=1 B_Radius=1 C_Radius=1
