OpenVSP model (file version 5), 2 components.
Geometry view with OpenVSP parameter names; values to 6 digits, angles in degrees, lengths in the model's unit.
Overall bounding box: X_Min=0 X_Len=10 Y_Min=-0.666667 Y_Len=8.66667 Z_Min=-0.666667 Z_Len=1.33333

Wing "WingGeom"
  location (X Y Z) 0 0 0, rotation 0 0 0
  bounding box size 1 8 0.100058
  totals: TotalSpan=8 TotalProjectedSpan=8 TotalChord=1 TotalArea=8 TotalAR=8
  root: chord 1, twist 0, NACA 4-series Camber=0 CamberLoc=0.2 ThickChord=0.1
  sections:
    n  Span  Root_Chord  Tip_Chord  Area  Sweep  Sweep_Location  Dihedral  Twist  Twist_Location  tip airfoil
    1  1     1           1          1     0      0               0         0      0.25            as above
    2  1     1           1          1     0      0               0         0      0.25            as above
    3  1     1           1          1     0      0               0         0      0.25            as above
    4  1     1           1          1     0      0               0         0      0.25            as above
    5  1     1           1          1     0      0               0         0      0.25            as above
    6  1     1           1          1     0      0               0         0      0.25            as above
    7  1     1           1          1     0      0               0         0      0.25            as above
    8  1     1           1          1     0      0               0         0      0.25            as above

Pod "PodGeom"
  location (X Y Z) 0 0 0, rotation 0 0 0
  bounding box size 10 1.33333 1.33333
  Design: FineRatio=15 Length=10
