OpenVSP model (file version 5), 1 components.
Geometry view with OpenVSP parameter names; values to 6 digits, angles in degrees, lengths in the model's unit.
Overall bounding box: X_Min=0 X_Len=10.2898 Y_Min=-30 Y_Len=60 Z_Min=-0.300136 Z_Len=0.600271

Wing "WingGeom"
  location (X Y Z) 0 0 0, rotation 0 0 0
  symmetric about XZ
  bounding box size 10.2898 60 0.600271
  totals: TotalSpan=60 TotalProjectedSpan=60 TotalChord=5 TotalArea=300 TotalAR=12
  root: chord 5, twist 0, NACA 4-series Camber=0 CamberLoc=0.2 ThickChord=0.12
  sections:
    n  Span  Root_Chord  Tip_Chord  Area   Sweep  Sweep_Location  Dihedral  Twist  Twist_Location  tip airfoil
    1  3.75  5           5          18.75  10     0               0         0      0               as above
    2  3.75  5           5          18.75  10     0               0         0      0               as above
    3  3.75  5           5          18.75  10     0               0         0      0               as above
    4  3.75  5           5          18.75  10     1               0         0      0               as above
    5  3.75  5           5          18.75  10     0               0         0      0               as above
    6  3.75  5           5          18.75  10     0               0         0      0               as above
    7  3.75  5           5          18.75  10     0               0         0      0               as above
    8  3.75  5           5          18.75  10     0               0         0      0               as above
